// COMSOL Multiphysics 5.0.0.243 model "ht.mph"
// Outline of the model tree

Parameters
  thickness_ybco = 0.1[mm]
  thickness_sub = 0.15[mm]
  width = 5[mm]
  S_ybco = thickness_ybco*width
  S_sub = thickness_sub*width
  Jc = 1e7[A/m^2]
  Ec = 1e-4[V/m]
  n = 28

Functions
  int1: Interpolation
    table = 
      {1.00862, 1933.86}
      {1.95291, 3140.51}
      {2.70582, 6814.7}
      {3.74898, 13480.1}
      {4.76717, 22680.2}
      {5.80731, 34788.4}
      {6.77729, 49212.5}
      {7.77469, 66470.5}
      {8.76712, 85722.3}
      {9.71802, 1.092815e+005}
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    interp = piecewisecubic
    extrap = linear
  int2: Interpolation
    funcname = HeatCap_sub
    table = 
      {20, 9.304427854}
      {40, 58.79458156}
      {60, 141.8132074}
      {80, 217.4933072}
      {100, 276.4962341}
      {120, 311.0037083}
      {140, 332.5134128}
      {160, 346.0488406}
      {180, 355.2917458}
      {200, 361.3358027}
      {220, 365.9596884}
      {240, 369.4937067}
      {260, 371.8201119}
      {280, 373.2838373}
      {300, 374.6135007}
    interp = piecewisecubic
    argunit = K
    fununit = J / (kg*K)
  int3: Interpolation
    funcname = ThermalConduct_sub
    table = 
      {50, 568.8649007}
      {60, 486.6385292}
      {70, 425.6163131}
      {80, 393.2545295}
      {90, 368.9517386}
      {100, 357.1057592}
      {110, 349.1630924}
      {120, 347.9973374}
      {130, 343.5003894}
      {140, 346.5117379}
      {150, 345.6004271}
      {160, 345.2382278}
      {170, 345.8784695}
      {180, 342.9700007}
      {190, 342.6553414}
      {200, 342.843153}
      {210, 343.7741812}
      {220, 341.1319673}
      {230, 342.5945361}
      {240, 341.7372369}
      {250, 347.0537615}
      {260, 340.8470437}
      {270, 344.0843828}
      {280, 343.4920394}
      {290, 343.4427321}
      {300, 341.905488}
    interp = piecewisecubic
    argunit = K
    fununit = W / (m*K)
  int4: Interpolation
    funcname = ThermalConduct_ybco
    table = 
      {50, 608.123}
      {60, 525.662}
      {70, 459.898}
      {80, 424.763}
      {90, 397.066}
      {100, 384.814}
      {110, 375.2}
      {120, 374.76}
      {130, 369.832}
      {140, 373.863}
      {150, 373.405}
      {160, 372.959}
      {170, 374.764}
      {180, 372.07}
      {190, 371.626}
      {200, 371.163}
      {210, 372.963}
      {220, 370.278}
      {230, 372.07}
      {240, 371.629}
      {250, 377.925}
      {260, 370.709}
      {270, 374.749}
      {280, 374.302}
      {290, 373.855}
      {300, 373.401}
    interp = piecewisecubic
    argunit = K
    fununit = W / (m*K)
  int5: Interpolation
    funcname = HeatCap_ybco
    table = {{20, 11.0149}, {40, 35.0079}, {60, 63.7771}, {80, 91.1843}, {100, 119.269}, {120, 143.945}, {140, 162.473}, {160, 181.001}, {180, 194.07}, {200, 206.221}, {220, 217.923}, {240, 225.978}, {260, 234.719}, {280, 242.33}, {300, 244.242}}
    interp = piecewisecubic
    argunit = K
    fununit = J / (kg*K)

Selections
  sel1: Explicit "YBCO_layer" on domains 1-8, 17-24, 33-40, 49-56, 65-72, 81-88, 97-104, 113-120, 129-136, 145-152
  sel2: Explicit "Sub_layer" on domains 9-16, 25-32, 41-48, 57-64, 73-80, 89-96, 105-112, 121-128, 137-144, 153-160

Geometry
  geom1 "Geometry 1" (2D axisymmetric, length unit m)
    imp1: Import | type = native; filename = C:\Users\SJTU\Desktop\multiphys_model\Untitled.mphbin
    del1: Delete "Delete Entities 1" | input = imp1(1) domains 1
    fin: Finalize "Form Union"

Materials
  mat4: Common "Sub" (disabled) on selection sel2
    def "Basic"
      density = 8170
      thermalconductivity = ThermalConduct_sub(T)
      heatcapacity = HeatCap_sub(T)
  mat3: Common "YBCO" (disabled) on selection sel1
    def "Basic"
      density = 6300
      thermalconductivity = ThermalConduct_ybco(T)
      heatcapacity = HeatCap_ybco(T)

Physics
  ht: HeatTransfer "Heat Transfer in Solids" on all domains
    dependent variable T
    solid1: SolidHeatTransferModel "Heat Transfer in Solids 1 - sub" (default)
      k_mat = userdef
      k = ThermalConduct_sub(T)
      rho_mat = userdef
      rho = 8170
      Cp_mat = userdef
      Cp = HeatCap_sub(T)
    init1: init "Initial Values 1" (default)
    axi1: AxialSymmetry (default)
    ins1: ThermalInsulation (default)
    solid2: SolidHeatTransferModel "Heat Transfer in Solids 2 - ybco" on selection sel1
      k_mat = userdef
      k = ThermalConduct_ybco(T)
      rho_mat = userdef
      rho = 6300
      Cp_mat = userdef
      Cp = HeatCap_ybco(T)
    hs1: HeatSource on domains 81 | heatSourceType = GeneralSource; FrameType = materialFrame
    init2: init "Initial Values 2" on domains 81 | Tinit = 77
    hs2: HeatSource on domains 82 | heatSourceType = GeneralSource; FrameType = materialFrame
    init3: init "Initial Values 3" on domains 82 | Tinit = 77
    hs3: HeatSource on domains 83 | heatSourceType = GeneralSource; FrameType = materialFrame
    init4: init "Initial Values 4" on domains 83 | Tinit = 77
    hs4: HeatSource on domains 84 | heatSourceType = GeneralSource; FrameType = materialFrame
    init5: init "Initial Values 5" on domains 84 | Tinit = 77
    hs5: HeatSource on domains 85 | heatSourceType = GeneralSource; FrameType = materialFrame
    init6: init "Initial Values 6" on domains 85 | Tinit = 77
    hs6: HeatSource on domains 86 | heatSourceType = GeneralSource; FrameType = materialFrame
    init7: init "Initial Values 7" on domains 86 | Tinit = 77
    hs7: HeatSource on domains 87 | heatSourceType = GeneralSource; FrameType = materialFrame
    init8: init "Initial Values 8" on domains 87 | Tinit = 77
    hs8: HeatSource on domains 88 | heatSourceType = GeneralSource; FrameType = materialFrame
    init9: init "Initial Values 9" on domains 88 | Tinit = 77
    hs9: HeatSource on domains 97 | heatSourceType = GeneralSource; FrameType = materialFrame
    init10: init "Initial Values 10" on domains 97 | Tinit = 77
    hs10: HeatSource on domains 98 | heatSourceType = GeneralSource; FrameType = materialFrame
    init11: init "Initial Values 11" on domains 98 | Tinit = 77
    hs11: HeatSource on domains 99 | heatSourceType = GeneralSource; FrameType = materialFrame
    init12: init "Initial Values 12" on domains 99 | Tinit = 77
    hs12: HeatSource on domains 100 | heatSourceType = GeneralSource; FrameType = materialFrame
    init13: init "Initial Values 13" on domains 100 | Tinit = 77
    hs13: HeatSource on domains 101 | heatSourceType = GeneralSource; FrameType = materialFrame
    init14: init "Initial Values 14" on domains 101 | Tinit = 77
    hs14: HeatSource on domains 102 | heatSourceType = GeneralSource; FrameType = materialFrame
    init15: init "Initial Values 15" on domains 102 | Tinit = 77
    hs15: HeatSource on domains 103 | heatSourceType = GeneralSource; FrameType = materialFrame
    init16: init "Initial Values 16" on domains 103 | Tinit = 77
    hs16: HeatSource on domains 104 | heatSourceType = GeneralSource; FrameType = materialFrame
    init17: init "Initial Values 17" on domains 104 | Tinit = 77
    hs17: HeatSource on domains 113 | heatSourceType = GeneralSource; FrameType = materialFrame
    init18: init "Initial Values 18" on domains 113 | Tinit = 77
    hs18: HeatSource on domains 114 | heatSourceType = GeneralSource; FrameType = materialFrame
    init19: init "Initial Values 19" on domains 114 | Tinit = 77
    hs19: HeatSource on domains 115 | heatSourceType = GeneralSource; FrameType = materialFrame
    init20: init "Initial Values 20" on domains 115 | Tinit = 77
    hs20: HeatSource on domains 116 | heatSourceType = GeneralSource; FrameType = materialFrame
    init21: init "Initial Values 21" on domains 116 | Tinit = 77
    hs21: HeatSource on domains 117 | heatSourceType = GeneralSource; FrameType = materialFrame
    init22: init "Initial Values 22" on domains 117 | Tinit = 77
    hs22: HeatSource on domains 118 | heatSourceType = GeneralSource; FrameType = materialFrame
    init23: init "Initial Values 23" on domains 118 | Tinit = 77
    hs23: HeatSource on domains 119 | heatSourceType = GeneralSource; FrameType = materialFrame
    init24: init "Initial Values 24" on domains 119 | Tinit = 77
    hs24: HeatSource on domains 120 | heatSourceType = GeneralSource; FrameType = materialFrame
    init25: init "Initial Values 25" on domains 120 | Tinit = 77
    hs25: HeatSource on domains 129 | heatSourceType = GeneralSource; FrameType = materialFrame
    init26: init "Initial Values 26" on domains 129 | Tinit = 77
    hs26: HeatSource on domains 130 | heatSourceType = GeneralSource; FrameType = materialFrame
    init27: init "Initial Values 27" on domains 130 | Tinit = 77
    hs27: HeatSource on domains 131 | heatSourceType = GeneralSource; FrameType = materialFrame
    init28: init "Initial Values 28" on domains 131 | Tinit = 77
    hs28: HeatSource on domains 132 | heatSourceType = GeneralSource; FrameType = materialFrame
    init29: init "Initial Values 29" on domains 132 | Tinit = 77
    hs29: HeatSource on domains 133 | heatSourceType = GeneralSource; FrameType = materialFrame
    init30: init "Initial Values 30" on domains 133 | Tinit = 77
    hs30: HeatSource on domains 134 | heatSourceType = GeneralSource; FrameType = materialFrame
    init31: init "Initial Values 31" on domains 134 | Tinit = 77
    hs31: HeatSource on domains 135 | heatSourceType = GeneralSource; FrameType = materialFrame
    init32: init "Initial Values 32" on domains 135 | Tinit = 77
    hs32: HeatSource on domains 136 | heatSourceType = GeneralSource; FrameType = materialFrame
    init33: init "Initial Values 33" on domains 136 | Tinit = 77
    hs33: HeatSource on domains 145 | heatSourceType = GeneralSource; FrameType = materialFrame
    init34: init "Initial Values 34" on domains 145 | Tinit = 77
    hs34: HeatSource on domains 146 | heatSourceType = GeneralSource; FrameType = materialFrame
    init35: init "Initial Values 35" on domains 146 | Tinit = 77
    hs35: HeatSource on domains 147 | heatSourceType = GeneralSource; FrameType = materialFrame
    init36: init "Initial Values 36" on domains 147 | Tinit = 77
    hs36: HeatSource on domains 148 | heatSourceType = GeneralSource; FrameType = materialFrame
    init37: init "Initial Values 37" on domains 148 | Tinit = 77
    hs37: HeatSource on domains 149 | heatSourceType = GeneralSource; FrameType = materialFrame
    init38: init "Initial Values 38" on domains 149 | Tinit = 77
    hs38: HeatSource on domains 150 | heatSourceType = GeneralSource; FrameType = materialFrame
    init39: init "Initial Values 39" on domains 150 | Tinit = 77
    hs39: HeatSource on domains 151 | heatSourceType = GeneralSource; FrameType = materialFrame
    init40: init "Initial Values 40" on domains 151 | Tinit = 77
    hs40: HeatSource on domains 152 | heatSourceType = GeneralSource; FrameType = materialFrame
    init41: init "Initial Values 41" on domains 152 | Tinit = 77
    hs41: HeatSource on domains 1 | heatSourceType = GeneralSource; FrameType = materialFrame
    init42: init "Initial Values 42" on domains 1 | Tinit = 77
    hs42: HeatSource on domains 2 | heatSourceType = GeneralSource; FrameType = materialFrame
    init43: init "Initial Values 43" on domains 2 | Tinit = 77
    hs43: HeatSource on domains 3 | heatSourceType = GeneralSource; FrameType = materialFrame
    init44: init "Initial Values 44" on domains 3 | Tinit = 77
    hs44: HeatSource on domains 4 | heatSourceType = GeneralSource; FrameType = materialFrame
    init45: init "Initial Values 45" on domains 4 | Tinit = 77
    hs45: HeatSource on domains 5 | heatSourceType = GeneralSource; FrameType = materialFrame
    init46: init "Initial Values 46" on domains 5 | Tinit = 77
    hs46: HeatSource on domains 6 | heatSourceType = GeneralSource; FrameType = materialFrame
    init47: init "Initial Values 47" on domains 6 | Tinit = 77
    hs47: HeatSource on domains 7 | heatSourceType = GeneralSource; FrameType = materialFrame
    init48: init "Initial Values 48" on domains 7 | Tinit = 77
    hs48: HeatSource on domains 8 | heatSourceType = GeneralSource; FrameType = materialFrame
    init49: init "Initial Values 49" on domains 8 | Tinit = 77
    hs49: HeatSource on domains 17 | heatSourceType = GeneralSource; FrameType = materialFrame
    init50: init "Initial Values 50" on domains 17 | Tinit = 77
    hs50: HeatSource on domains 18 | heatSourceType = GeneralSource; FrameType = materialFrame
    init51: init "Initial Values 51" on domains 18 | Tinit = 77
    hs51: HeatSource on domains 19 | heatSourceType = GeneralSource; FrameType = materialFrame
    init52: init "Initial Values 52" on domains 19 | Tinit = 77
    hs52: HeatSource on domains 20 | heatSourceType = GeneralSource; FrameType = materialFrame
    init53: init "Initial Values 53" on domains 20 | Tinit = 77
    hs53: HeatSource on domains 21 | heatSourceType = GeneralSource; FrameType = materialFrame
    init54: init "Initial Values 54" on domains 21 | Tinit = 77
    hs54: HeatSource on domains 22 | heatSourceType = GeneralSource; FrameType = materialFrame
    init55: init "Initial Values 55" on domains 22 | Tinit = 77
    hs55: HeatSource on domains 23 | heatSourceType = GeneralSource; FrameType = materialFrame
    init56: init "Initial Values 56" on domains 23 | Tinit = 77
    hs56: HeatSource on domains 24 | heatSourceType = GeneralSource; FrameType = materialFrame
    init57: init "Initial Values 57" on domains 24 | Tinit = 77
    hs57: HeatSource on domains 33 | heatSourceType = GeneralSource; FrameType = materialFrame
    init58: init "Initial Values 58" on domains 33 | Tinit = 77
    hs58: HeatSource on domains 34 | heatSourceType = GeneralSource; FrameType = materialFrame
    init59: init "Initial Values 59" on domains 34 | Tinit = 77
    hs59: HeatSource on domains 35 | heatSourceType = GeneralSource; FrameType = materialFrame
    init60: init "Initial Values 60" on domains 35 | Tinit = 77
    hs60: HeatSource on domains 36 | heatSourceType = GeneralSource; FrameType = materialFrame
    init61: init "Initial Values 61" on domains 36 | Tinit = 77
    hs61: HeatSource on domains 37 | heatSourceType = GeneralSource; FrameType = materialFrame
    init62: init "Initial Values 62" on domains 37 | Tinit = 77
    hs62: HeatSource on domains 38 | heatSourceType = GeneralSource; FrameType = materialFrame
    init63: init "Initial Values 63" on domains 38 | Tinit = 77
    hs63: HeatSource on domains 39 | heatSourceType = GeneralSource; FrameType = materialFrame
    init64: init "Initial Values 64" on domains 39 | Tinit = 77
    hs64: HeatSource on domains 40 | heatSourceType = GeneralSource; FrameType = materialFrame
    init65: init "Initial Values 65" on domains 40 | Tinit = 77
    hs65: HeatSource on domains 49 | heatSourceType = GeneralSource; FrameType = materialFrame
    init66: init "Initial Values 66" on domains 49 | Tinit = 77
    hs66: HeatSource on domains 50 | heatSourceType = GeneralSource; FrameType = materialFrame
    init67: init "Initial Values 67" on domains 50 | Tinit = 77
    hs67: HeatSource on domains 51 | heatSourceType = GeneralSource; FrameType = materialFrame
    init68: init "Initial Values 68" on domains 51 | Tinit = 77
    hs68: HeatSource on domains 52 | heatSourceType = GeneralSource; FrameType = materialFrame
    init69: init "Initial Values 69" on domains 52 | Tinit = 77
    hs69: HeatSource on domains 53 | heatSourceType = GeneralSource; FrameType = materialFrame
    init70: init "Initial Values 70" on domains 53 | Tinit = 77
    hs70: HeatSource on domains 54 | heatSourceType = GeneralSource; FrameType = materialFrame
    init71: init "Initial Values 71" on domains 54 | Tinit = 77
    hs71: HeatSource on domains 55 | heatSourceType = GeneralSource; FrameType = materialFrame
    init72: init "Initial Values 72" on domains 55 | Tinit = 77
    hs72: HeatSource on domains 56 | heatSourceType = GeneralSource; FrameType = materialFrame
    init73: init "Initial Values 73" on domains 56 | Tinit = 77
    hs73: HeatSource on domains 65 | heatSourceType = GeneralSource; FrameType = materialFrame
    init74: init "Initial Values 74" on domains 65 | Tinit = 77
    hs74: HeatSource on domains 66 | heatSourceType = GeneralSource; FrameType = materialFrame
    init75: init "Initial Values 75" on domains 66 | Tinit = 77
    hs75: HeatSource on domains 67 | heatSourceType = GeneralSource; FrameType = materialFrame
    init76: init "Initial Values 76" on domains 67 | Tinit = 77
    hs76: HeatSource on domains 68 | heatSourceType = GeneralSource; FrameType = materialFrame
    init77: init "Initial Values 77" on domains 68 | Tinit = 77
    hs77: HeatSource on domains 69 | heatSourceType = GeneralSource; FrameType = materialFrame
    init78: init "Initial Values 78" on domains 69 | Tinit = 77
    hs78: HeatSource on domains 70 | heatSourceType = GeneralSource; FrameType = materialFrame
    init79: init "Initial Values 79" on domains 70 | Tinit = 77
    hs79: HeatSource on domains 71 | heatSourceType = GeneralSource; FrameType = materialFrame
    init80: init "Initial Values 80" on domains 71 | Tinit = 77
    hs80: HeatSource on domains 72 | heatSourceType = GeneralSource; FrameType = materialFrame
    init81: init "Initial Values 81" on domains 72 | Tinit = 77
    hs81: HeatSource on domains 89-96, 105-112, 121-128, 137-144, 153-160
      heatSourceType = GeneralSource
      FrameType = materialFrame
    init82: init "Initial Values 82" on domains 89-96, 105-112, 121-128, 137-144, 153-160 | Tinit = 77
    hs82: HeatSource on domains 9-16, 25-32, 41-48, 57-64, 73-80
      heatSourceType = GeneralSource
      FrameType = materialFrame
    init83: init "Initial Values 83" on domains 9-16, 25-32, 41-48, 57-64, 73-80 | Tinit = 77
    hf1: HeatFluxBoundary "Heat Flux 1" on boundaries 1-3, 5, 7, 9, 11, 13, 15, 17, 19, 34, 36, 51, 53, 68, 70, 85, 87, 102, 104, 119, 121, 136, 138, 153, 155, 170-181, 183, 185, 187, 189, 191, 193, 195, 197, 212, 214, 229, 231, 246, 248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
      HeatFluxType = GeneralInwardHeatFlux
      q0 = -int1( T/(1[K]) - 77 )

Mesh
  mesh1 "Mesh 1" (physics-controlled)
    size: MeshSizeDefault | hauto = 9

Studies
  std1 "Study 1"
    time: Transient "Time Dependent" | tlist = range(0,1e-5,1e-5)
  std2 "Study 2"
    time: Transient "Time Dependent" | tlist = range(0,1e-5,1e-5); useinitsol = on; initmethod = sol; initstudy = std1

Solver configurations
  sol1 "Solution 1" (study std1)
    v1: Variables "Dependent Variables 1"
    t1: Time "Time-Dependent Solver 1" | tlist = range(0,1e-5,1e-5); maxorder = 2; estrat = exclude
      fc1: FullyCoupled | maxiter = 5; damp = 0.9; jtech = once
      d1: Direct | linsolver = pardiso
  sol2 "Solution 2" (study std2)
    v1: Variables "Dependent Variables 1"
    t1: Time "Time-Dependent Solver 1"
      tlist = range(0,1e-5,1e-5)
      atolglobalmethod = scaled
      atolglobal = 0.001
      maxorder = 2
      estrat = exclude
      fc1: FullyCoupled | linsolver = d1; maxiter = 5; damp = 0.9; jtech = once
      d1: Direct | linsolver = pardiso

Datasets
  dset1: Solution | solution = sol1
  rev1: Revolve2D "Revolution 2D 1" | data = dset1; genpoints = {{0, 0}, {0, 1}}; startangle = -90; revangle = 225
  dset2: Solution | solution = sol2