// COMSOL Multiphysics 5.0.0.243 model "ht_new.mph"
// Outline of the model tree

Parameters
  thickness_ybco = 0.05[mm]
  thickness_sub = 0.2[mm]
  width = 5[mm]
  S_ybco = thickness_ybco*width
  S_sub = thickness_sub*width
  Jc = 1e7[A/m^2]
  Ec = 1e-4[V/m]
  n = 28

Functions
  int1: Interpolation
    table = 
      {1.00862, 1933.86}
      {1.95291, 3140.51}
      {2.70582, 6814.7}
      {3.74898, 13480.1}
      {4.76717, 22680.2}
      {5.80731, 34788.4}
      {6.77729, 49212.5}
      {7.77469, 66470.5}
      {8.76712, 85722.3}
      {9.71802, 1.092815e+005}
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    interp = piecewisecubic
    extrap = linear
  int5: Interpolation
    funcname = HeatCap_ybco
    table = {{20, 11.0149}, {40, 35.0079}, {60, 63.7771}, {80, 91.1843}, {100, 119.269}, {120, 143.945}, {140, 162.473}, {160, 181.001}, {180, 194.07}, {200, 206.221}, {220, 217.923}, {240, 225.978}, {260, 234.719}, {280, 242.33}, {300, 244.242}}
    interp = piecewisecubic
    argunit = K
    fununit = J / (kg*K)
  int2: Interpolation
    funcname = HeatCap_sub
    table = 
      {20, 9.304427854}
      {40, 58.79458156}
      {60, 141.8132074}
      {80, 217.4933072}
      {100, 276.4962341}
      {120, 311.0037083}
      {140, 332.5134128}
      {160, 346.0488406}
      {180, 355.2917458}
      {200, 361.3358027}
      {220, 365.9596884}
      {240, 369.4937067}
      {260, 371.8201119}
      {280, 373.2838373}
      {300, 374.6135007}
    interp = piecewisecubic
    argunit = K
    fununit = J / (kg*K)
  int6: Interpolation
    funcname = HeatCap_insulation
    table = 
      {60, 500.877193}
      {70, 587.7192982}
      {80, 668.4210526}
      {90, 745.6140351}
      {100, 818.4210526}
      {120, 956.1403509}
      {140, 1087.719298}
      {160, 1210.526316}
      {180, 1333.333333}
      {200, 1456.140351}
      {220, 1570.175439}
      {240, 1684.210526}
      {260, 1789.473684}
      {280, 1877.192982}
      {300, 2000}
    interp = piecewisecubic
    argunit = K
    fununit = J / (kg*K)
  int4: Interpolation
    funcname = ThermalConduct_ybco
    table = 
      {50, 608.123}
      {60, 525.662}
      {70, 459.898}
      {80, 424.763}
      {90, 397.066}
      {100, 384.814}
      {110, 375.2}
      {120, 374.76}
      {130, 369.832}
      {140, 373.863}
      {150, 373.405}
      {160, 372.959}
      {170, 374.764}
      {180, 372.07}
      {190, 371.626}
      {200, 371.163}
      {210, 372.963}
      {220, 370.278}
      {230, 372.07}
      {240, 371.629}
      {250, 377.925}
      {260, 370.709}
      {270, 374.749}
      {280, 374.302}
      {290, 373.855}
      {300, 373.401}
    interp = piecewisecubic
    argunit = K
    fununit = W / (m*K)
  int3: Interpolation
    funcname = ThermalConduct_sub
    table = 
      {50, 568.8649007}
      {60, 486.6385292}
      {70, 425.6163131}
      {80, 393.2545295}
      {90, 368.9517386}
      {100, 357.1057592}
      {110, 349.1630924}
      {120, 347.9973374}
      {130, 343.5003894}
      {140, 346.5117379}
      {150, 345.6004271}
      {160, 345.2382278}
      {170, 345.8784695}
      {180, 342.9700007}
      {190, 342.6553414}
      {200, 342.843153}
      {210, 343.7741812}
      {220, 341.1319673}
      {230, 342.5945361}
      {240, 341.7372369}
      {250, 347.0537615}
      {260, 340.8470437}
      {270, 344.0843828}
      {280, 343.4920394}
      {290, 343.4427321}
      {300, 341.905488}
    interp = piecewisecubic
    argunit = K
    fununit = W / (m*K)
  int7: Interpolation
    funcname = ThermalConduct_insulation
    table = 
      {10, 0.054869536}
      {20, 0.111270972}
      {30, 0.168265456}
      {40, 0.225648514}
      {50, 0.283322256}
      {60, 0.341228708}
      {70, 0.399329402}
      {80, 0.4575969}
      {90, 0.516010628}
      {100, 0.574554575}
      {110, 0.633215921}
      {120, 0.691984167}
      {130, 0.750850555}
      {140, 0.809807665}
      {150, 0.868849131}
      {160, 0.927969429}
      {170, 0.987163722}
      {180, 1.046427736}
      {190, 1.105757669}
      {200, 1.165150116}
      {210, 1.224602009}
      {220, 1.284110572}
      {230, 1.343673276}
      {240, 1.403287813}
      {250, 1.462952063}
      {260, 1.522664077}
      {270, 1.582422052}
      {280, 1.642224318}
      {290, 1.702069325}
      {300, 1.761955626}
    interp = piecewisecubic
    argunit = K
    fununit = W / (m*K)

Selections
  sel1: Explicit "YBCO_layer" on no domains
  sel2: Explicit "Sub_layer" on no domains

Geometry
  geom1 "Geometry 1" (2D axisymmetric, length unit mm)
    imp1: Import (disabled) | type = native; filename = C:\Users\SJTU\Desktop\multiphys_model\Untitled.mphbin
    del1: Delete "Delete Entities 1" (disabled) | input = imp1(1) domains 1
    sca1: Scale (disabled)
    r1: Rectangle "ybco" | pos = {55, -width * 8 / 2}; size = {thickness_ybco, width}
    r2: Rectangle "sub" | pos = {55+thickness_ybco, -width*8/2}; size = {thickness_sub, width}
    arr1: Array | input = r1, r2; size = 5; type = linear; linearsize = 5; displ = {thickness_ybco + thickness_sub, 0}
    arr2: Array | input = arr1; size = 8; type = linear; linearsize = 8; displ = {0, width}
    r4: Rectangle "ybco 1" | pos = {57.25-0.5, -width * 8 / 2}; size = {thickness_ybco, width}
    r5: Rectangle "sub 1" | pos = {57.25+thickness_ybco-0.5, -width*8/2}; size = {thickness_sub+0.15, width}
    arr3: Array | input = r4, r5; size = {5, 8}; fullsize = {5, 8}; displ = {0.6, width}
    r6: Rectangle "insulation" | pos = {57.25 - 0.1-0.5, -20-0.1}; size = {3, 40+0.2}
    fin: Finalize "Form Union"

Materials
  mat4: Common "Sub" (disabled) on selection sel2
    def "Basic"
      density = 8170
      thermalconductivity = ThermalConduct_sub(T)
      heatcapacity = HeatCap_sub(T)
  mat3: Common "YBCO" (disabled) on selection sel1
    def "Basic"
      density = 6300
      thermalconductivity = ThermalConduct_ybco(T)
      heatcapacity = HeatCap_ybco(T)

Physics
  ht: HeatTransfer "Heat Transfer in Solids" on all domains
    dependent variable T
    solid1: SolidHeatTransferModel "Heat Transfer in Solids 1 - sub" (default)
      k_mat = userdef
      k = ThermalConduct_sub(T)
      rho_mat = userdef
      rho = 8170
      Cp_mat = userdef
      Cp = HeatCap_sub(T)
    init1: init "Initial Values 1" (default)
    axi1: AxialSymmetry (default)
    ins1: ThermalInsulation (default)
    solid2: SolidHeatTransferModel "Heat Transfer in Solids 2 - ybco" on domains 1-8, 17-24, 33-40, 49-56, 65-72, 82-89, 98-105, 114-121, 130-137, 146-153
      k_mat = userdef
      k = ThermalConduct_ybco(T)
      rho_mat = userdef
      rho = 6300
      Cp_mat = userdef
      Cp = HeatCap_ybco(T)
    solid3: SolidHeatTransferModel "Heat Transfer in Solids 3 - insulation" on domains 81
      k_mat = userdef
      k = ThermalConduct_insulation(T)
      rho_mat = userdef
      rho = 1420
      Cp_mat = userdef
      Cp = HeatCap_insulation(T)
    hs1: HeatSource on domains 82
    hs2: HeatSource on domains 83
    hs3: HeatSource on domains 84
    hs4: HeatSource on domains 85
    hs5: HeatSource on domains 86
    hs6: HeatSource on domains 87
    hs7: HeatSource on domains 88
    hs8: HeatSource on domains 89
    hs9: HeatSource on domains 98
    hs10: HeatSource on domains 99
    hs11: HeatSource on domains 100
    hs12: HeatSource on domains 101
    hs13: HeatSource on domains 102
    hs14: HeatSource on domains 103
    hs15: HeatSource on domains 104
    hs16: HeatSource on domains 105
    hs17: HeatSource on domains 114
    hs18: HeatSource on domains 115
    hs19: HeatSource on domains 116
    hs20: HeatSource on domains 117
    hs21: HeatSource on domains 118
    hs22: HeatSource on domains 119
    hs23: HeatSource on domains 120
    hs24: HeatSource on domains 121
    hs25: HeatSource on domains 130
    hs26: HeatSource on domains 131
    hs27: HeatSource on domains 132
    hs28: HeatSource on domains 133
    hs29: HeatSource on domains 134
    hs30: HeatSource on domains 135
    hs31: HeatSource on domains 136
    hs32: HeatSource on domains 137
    hs33: HeatSource on domains 146
    hs34: HeatSource on domains 147
    hs35: HeatSource on domains 148
    hs36: HeatSource on domains 149
    hs37: HeatSource on domains 150
    hs38: HeatSource on domains 151
    hs39: HeatSource on domains 152
    hs40: HeatSource on domains 153
    hs41: HeatSource on domains 1
    hs42: HeatSource on domains 2
    hs43: HeatSource on domains 3
    hs44: HeatSource on domains 4
    hs45: HeatSource on domains 5
    hs46: HeatSource on domains 6
    hs47: HeatSource on domains 7
    hs48: HeatSource on domains 8
    hs49: HeatSource on domains 17
    hs50: HeatSource on domains 18
    hs51: HeatSource on domains 19
    hs52: HeatSource on domains 20
    hs53: HeatSource on domains 21
    hs54: HeatSource on domains 22
    hs55: HeatSource on domains 23
    hs56: HeatSource on domains 24
    hs57: HeatSource on domains 33
    hs58: HeatSource on domains 34
    hs59: HeatSource on domains 35
    hs60: HeatSource on domains 36
    hs61: HeatSource on domains 37
    hs62: HeatSource on domains 38
    hs63: HeatSource on domains 39
    hs64: HeatSource on domains 40
    hs65: HeatSource on domains 49
    hs66: HeatSource on domains 50
    hs67: HeatSource on domains 51
    hs68: HeatSource on domains 52
    hs69: HeatSource on domains 53
    hs70: HeatSource on domains 54
    hs71: HeatSource on domains 55
    hs72: HeatSource on domains 56
    hs73: HeatSource on domains 65
    hs74: HeatSource on domains 66
    hs75: HeatSource on domains 67
    hs76: HeatSource on domains 68
    hs77: HeatSource on domains 69
    hs78: HeatSource on domains 70
    hs79: HeatSource on domains 71
    hs80: HeatSource on domains 72
    hs81: HeatSource on domains 9-16, 25-32, 41-48, 57-64, 73-80
    hs82: HeatSource on domains 90-97, 106-113, 122-129, 138-145, 154-161
    hf1: HeatFluxBoundary "Heat Flux 1" on boundaries 1-3, 5, 7, 9, 11, 13, 15, 17, 19, 34, 36, 51, 53, 68, 70, 85, 87, 102, 104, 119, 121, 136, 138, 153, 155, 170-181, 392
      HeatFluxType = GeneralInwardHeatFlux
      q0 = -int1( T/(1[K]) - 77 )

Mesh
  mesh1 "Mesh 1" (physics-controlled)
    size: MeshSizeDefault | hauto = 9

Studies
  std1 "Study 1"
    time: Transient "Time Dependent" | tlist = range(0,1e-5,1e-5)
  std2 "Study 2"
    time: Transient "Time Dependent" | tlist = range(0,1e-5,1e-5); useinitsol = on; initmethod = sol; initstudy = std1

Solver configurations
  sol1 "Solution 1" (study std1)
    v1: Variables "Dependent Variables 1"
    t1: Time "Time-Dependent Solver 1" | tlist = range(0,1e-5,1e-5); maxorder = 2; estrat = exclude
      fc1: FullyCoupled | maxiter = 5; damp = 0.9; jtech = once
      d1: Direct | linsolver = pardiso
  sol2 "Solution 2" (study std2)
    v1: Variables "Dependent Variables 1"
    t1: Time "Time-Dependent Solver 1"
      tlist = range(0,1e-5,1e-5)
      atolglobalmethod = scaled
      atolglobal = 0.001
      maxorder = 2
      estrat = exclude
      fc1: FullyCoupled | linsolver = d1; maxiter = 5; damp = 0.9; jtech = once
      d1: Direct | linsolver = pardiso

Datasets
  dset1: Solution | solution = sol1
  rev1: Revolve2D "Revolution 2D 1" | data = dset1; genpoints = {{0, 0}, {0, 1}}; startangle = -90; revangle = 225
  dset2: Solution | solution = sol2