// COMSOL Multiphysics 5.0.0.243 model "mfh_new.mph"
// Outline of the model tree

Parameters
  thickness_ybco = 0.05 [mm]
  thickness_sub = 0.2[mm]
  width = 5[mm]
  S_ybco = thickness_ybco * width
  S_sub = thickness_sub * width
  Jc = 1e7 [A/m^2]
  Ec = 1e-4[V/m]
  n = 28

Geometry
  geom1 "Geometry 1" (2D axisymmetric, length unit mm)
    r1: Rectangle "ybco" | pos = {55, - width * 8 / 2}; size = {thickness_ybco, width}
    r2: Rectangle "sub" | pos = {55 + thickness_ybco, - width * 8 / 2}; size = {thickness_sub, width}
    arr1: Array | input = r1, r2; size = 5; type = linear; displ = {thickness_ybco + thickness_sub, 0}
    arr2: Array (disabled)
      input = arr1
      size = 2
      type = linear
      displ = {(thickness_ybco + thickness_sub) * 5 + 0.2, 0}
    r3: Rectangle | pos = {0, -200}; size = {350, 400}
    arr3: Array | input = arr1; size = 8; type = linear; displ = {0, width}
    r4: Rectangle "ybco 1" | pos = {57.25-0.5, - width * 8 / 2}; size = {thickness_ybco, width}
    r5: Rectangle "sub 1" | pos = {57.25+thickness_ybco-0.5, - width * 8 / 2}; size = {thickness_sub+0.15, width}
    arr4: Array | input = r4, r5; size = {5, 8}; type = rectangular; fullsize = {5, 8}; displ = {0.6, width}
    fin: Finalize "Form Union"

Materials
  mat1: Common "Air" on all domains
    def "Basic"
      relpermeability = 1
      relpermittivity = 1
      dynamicviscosity = eta(T[1/K])[Pa*s]
      ratioofspecificheat = 1.4
      electricconductivity = 1[S/m]
      heatcapacity = Cp(T[1/K])[J/(kg*K)]
      density = rho(pA[1/Pa],T[1/K])[kg/m^3]
      thermalconductivity = k(T[1/K])[W/(m*K)]
      soundspeed = cs(T[1/K])[m/s]
      eta: Piecewise | arg = T; pieces = {200.0, 1600.0, -8.38278E-7+8.35717342E-8*T^1-7.69429583E-11*T^2+4.6437266E-14*T^3-1.06585607E-17*T^4}
      Cp: Piecewise | arg = T; pieces = {200.0, 1600.0, 1047.63657-0.372589265*T^1+9.45304214E-4*T^2-6.02409443E-7*T^3+1.2858961E-10*T^4}
      rho: Analytic | expr = pA*0.02897/8.314/T; args = {pA, T}; dermethod = manual; argders = {{pA, d(pA*0.02897/8.314/T,pA)}, {T, d(pA*0.02897/8.314/T,T)}}
      k: Piecewise | arg = T; pieces = {200.0, 1600.0, -0.00227583562+1.15480022E-4*T^1-7.90252856E-8*T^2+4.11702505E-11*T^3-7.43864331E-15*T^4}
      cs: Analytic | expr = sqrt(1.4*287*T); args = T; dermethod = manual; argders = {T, d(sqrt(1.4*287*T),T)}
    RefractiveIndex
      n = 1
      ki = 0

Physics
  mfh: MagneticFieldFormulation on all domains
    dependent variable H = {Hr, Hphi, Hz}
    fl1: FaradaysLaw (default)
    mgl1: MagneticGaussLaw (default)
    axi1: AxialSymmetry (default)
    mi1: MagneticInsulation (default)
    init1: init "Initial Values 1" (default)
    ecd1: ExternalCurrentDensity on domains 82-89, 98-105, 114-121, 130-137, 146-153 | Je = {0, 0, 0}
    ecd2: ExternalCurrentDensity on domains 2-9, 18-25, 34-41, 50-57, 66-73
    ecd3: ExternalCurrentDensity on domains 90-97, 106-113, 122-129, 138-145, 154-161
    ecd4: ExternalCurrentDensity on domains 10-17, 26-33, 42-49, 58-65, 74-81

Mesh
  mesh1 "Mesh 1" (physics-controlled)
    size: MeshSizeDefault | hauto = 5

Studies
  std1 "Study 1"
    stat: Stationary

Solver configurations
  sol1 "Solution 1" (study std1)
    v1: Variables "Dependent Variables 1"
    s1: Stationary "Stationary Solver 1"
      dDef: Direct
      fc1: FullyCoupled | linsolver = dDef

Datasets
  dset1: Solution | solution = sol1
  rev1: Revolve2D "Revolution 2D 1" | data = dset1; genpoints = {{0, 0}, {0, 1}}; startangle = -90; revangle = 225

Derived values
  av1: AvSurface "Surface Average 1" on domains 41 | data = dset1; table = tbl1; expr = mfh.Br

Tables
  tbl1: Table
    // Surface Average 1 (mfh.Bz)
    Magnetic flux density, z component (T) | Magnetic flux density, r component (T)
    3.37231 | 2.46211

Plots
  pg1: PlotGroup2D "Magnetic Flux Density Norm (mfh)" | data = dset1
    surf1: Surface | expr = mfh.normB